# INITIALIZATION
clear

units metal
atom_style atomic
boundary p p p

variable name index STGB_210 #should be selected by user
variable structure_name index sname

variable self index thermal_relax
variable path0 index workspace
variable pot_path index potentials
variable home index scripts
variable thermo_output index thermo_output
variable dump index dump
variable dat index dat
variable path index ${path0}/${name}
variable structure index ${path}/${dat}/${structure_name}

shell mkdir ../${path}/logs
log ../${path}/logs/${self}.log
shell rm log.lammps

shell mkdir ../${path}/${dat}

variable thermo_step_TR equal 500
variable dump_step_TR equal 500
include ../${path}/input.txt
print " "
print "%%%%%%%%%%%%%%%%%%%%%%%%%"
print "----------input----------"
shell cat ../${path}/input.txt
print " "
print "%%%%%%%%%%%%%%%%%%%%%%%%%"
print " "
variable dt equal ${dt_TR}


variable dump_path index ${path}/${dump}/${self}
shell mkdir ../${path}/${dump}
shell mkdir ../${dump_path}

timestep ${dt}

# ATOMS DEFINITION
read_data ../${structure} nocoeff

######################################
# DEFINE INTERATOMIC POTENTIAL

shell cd ../${pot_path}
include ${potname_pure}
shell cd ../${home}

######################################
# DEFINE THERMO AND OUTPUT

thermo_style custom time temp press pe
thermo ${thermo_step_TR}
shell mkdir ../${path}/${thermo_output}
variable file index ../${path}/${thermo_output}/${self}.txt
print "##dt = ${dt}" file ${file} screen no
print "#time; temp; press; pe" append ${file} screen no
fix out all print ${thermo_step_TR} "$(time); $(temp); $(press); $(pe)" append ${file} screen no
dump 1 all cfg ${dump_step_TR} ../${dump_path}/dump_*.cfg mass type xs ys zs
dump_modify 1 element ${element1}
print "dumpfile ../${dump_path}/dump_0.cfg"
######################################
# START
#fix barostat all press/berendsen iso 0.0 0.0 $(1000.0*dt) modulus 1000000
fix thermostat all langevin ${T} ${T} ${langevin_damp} ${rnd_seed_TR}
fix integrator all nve
run ${thermal_relax_steps}

shell cd ../${path}/${dat}
write_data ${self}_T${T}_steps${thermal_relax_steps}.dat
print "datfile ${self}_T${T}_steps${thermal_relax_steps}.dat"
shell cd ../../../${home}

shell rm log.lammps
print "All done"
